! =====================================================================
! Acometidas Domiciliarias Monofásicas (Service Drops)
! Conectadas a diferentes fases para inducir desbalance realista
! =====================================================================

New Line.Drop_L1   bus1=Node_1.1  bus2=LoadBus_1.1  phases=1  length=15  units=m  linecode=LineCode_Al_1x25_25
New Line.Drop_L2   bus1=Node_2.2  bus2=LoadBus_2.1  phases=1  length=20  units=m  linecode=LineCode_Al_1x25_25
New Line.Drop_L3   bus1=Node_3.1  bus2=LoadBus_3.1  phases=1  length=18  units=m  linecode=LineCode_Al_1x25_25
New Line.Drop_L4   bus1=Node_3.3  bus2=LoadBus_4.1  phases=1  length=25  units=m  linecode=LineCode_Al_1x25_25
New Line.Drop_L5   bus1=Node_4.2  bus2=LoadBus_5.1  phases=1  length=15  units=m  linecode=LineCode_Al_1x25_25
New Line.Drop_L6   bus1=Node_5.3  bus2=LoadBus_6.1  phases=1  length=22  units=m  linecode=LineCode_Al_1x25_25
New Line.Drop_L7   bus1=Node_5.1  bus2=LoadBus_7.1  phases=1  length=16  units=m  linecode=LineCode_Al_1x25_25
New Line.Drop_L8   bus1=Node_6.2  bus2=LoadBus_8.1  phases=1  length=30  units=m  linecode=LineCode_Al_1x25_25
